*Heading
** Job name: Thermal Model name: Model-1
** Generated by: Abaqus/CAE Student Edition 2020
*Preprint, echo=NO, model=NO, history=NO, contact=NO
**
** PARTS
**
*Part, name=Part-1
*Node
      1,       116.93,         117.
      2,   133.279999,           0.
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*Element, type=DC2D3
  1, 128,  10,  11
  2, 156, 119, 142
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*Nset, nset=Concrete
   1,   2,   6,   7,  10,  11
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*Elset, elset=Concrete, generate
 237,  295,    1
*Nset, nset=Priming
   1,   2,   3,   4,   5,   6
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*Elset, elset=Priming
   1,   2,   3,   4,   5,   6
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** Section: Priming
*Solid Section, elset=Priming, material=Primimg
,
** Section: Concrete
*Solid Section, elset=Concrete, material=Concrete_1
,
*End Part
**
**
** ASSEMBLY
**
*Assembly, name=Assembly
**
*Instance, name=Part-1-1, part=Part-1
*End Instance
**
*Nset, nset=T_air, instance=Part-1-1
  1,  3,  4,  5,  6,  8
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*Elset, elset=T_air, instance=Part-1-1
  16,  24,  25,  35,  36,  37
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*Nset, nset=T_water, instance=Part-1-1
  8,  9, 80, 81, 82, 83
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*Elset, elset=T_water, instance=Part-1-1
 304, 308, 310, 326, 354, 356
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*End Assembly
**
** MATERIALS
**
*Material, name=Concrete_1
*Conductivity
 1.75,
*Material, name=Primimg
*Conductivity
 1.5,
** ----------------------------------------------------------------
**
** STEP: Thermal
**
*Step, name=Thermal, nlgeom=NO
*Heat Transfer, steady state
1., 1., 1., 1.,
**
** BOUNDARY CONDITIONS
**
** Name: T_air Type: Temperature
*Boundary
T_air, 11, 11, 25.
** Name: T_water Type: Temperature
*Boundary
T_water, 11, 11, 5.
**
** OUTPUT REQUESTS
**
*Restart, write, frequency=0
**
** FIELD OUTPUT: F-Output-1
**
*Output, field
*Node Output
NT,
*Element Output, directions=YES
TEMP,
*Output, history, frequency=0
*End Step
