*Heading
** Job name: Static_Dam Model name: Model-1
** Generated by: Abaqus/CAE Student Edition 2020
*Preprint, echo=NO, model=NO, history=NO, contact=NO
**
** PARTS
**
*Part, name=Part-1
*Node
      1,   478.579987,           0.
      2,   317.160004,           0.
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*Element, type=CPE3
  1, 152, 102, 103
  2, 227, 226,  29
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*Nset, nset=Concrete
   3,   4,   9,  12,  35, 108
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*Elset, elset=Concrete, generate
 861,  883,    1
*Nset, nset=Priming
   2,   3,   4,   5,   9,  10
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*Elset, elset=Priming
 773, 774, 775, 776, 777, 778
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*Nset, nset=Set-3
   1,   2,   3,   4,   5,   6
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*Elset, elset=Set-3, generate
   1,  772,    1
*Nset, nset=Set-4
   3,   4,   9,  12,  35, 108
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*Elset, elset=Set-4, generate
 861,  883,    1
*Nset, nset=Set-5
   2,   3,   4,   5,   9,  10
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*Elset, elset=Set-5
 773, 774, 775, 776, 777, 778
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** Section: Rock
*Solid Section, elset=Set-3, material=Rock
,
** Section: Concrete
*Solid Section, elset=Set-5, material=Concrete
,
** Section: Concrete2
*Solid Section, elset=Set-4, material=Concrete2
,
*End Part
**
**
** ASSEMBLY
**
*Assembly, name=Assembly
**
*Instance, name=Part-1-1, part=Part-1
*End Instance
**
*Nset, nset=BC_X, instance=Part-1-1
   1,   6,   7,   8,  52,  53
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*Elset, elset=BC_X, instance=Part-1-1
   1,   7,  44,  49,  51,  93,  94,  96,  97, 100, 118, 126, 129, 149, 295, 302
*Nset, nset=BC_Y, instance=Part-1-1
   7,   8,  59,  60,  61,  62
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*Elset, elset=BC_Y, instance=Part-1-1
  14,  16,  17,  19,  21,  51
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*Elset, elset=_NPU1_S2, internal, instance=Part-1-1
  27, 104, 133, 134, 137, 138
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*Elset, elset=_NPU1_S1, internal, instance=Part-1-1
  44, 893, 902
*Elset, elset=_NPU1_S3, internal, instance=Part-1-1
 891,
*Surface, type=ELEMENT, name=NPU1
_NPU1_S2, S2
_NPU1_S1, S1
_NPU1_S3, S3
*End Assembly
**
** MATERIALS
**
*Material, name=Concrete
*Density
2500.,
*Elastic
 2.5e+10, 0.2
*Material, name=Concrete2
*Density
2200.,
*Elastic
 2.2e+10, 0.2
*Material, name=Rock
*Elastic
 1.7e+10, 0.2
** ----------------------------------------------------------------
**
** STEP: Static
**
*Step, name=Static, nlgeom=NO
*Static
1., 1., 1e-05, 1.
**
** BOUNDARY CONDITIONS
**
** Name: BC-Y Type: Displacement/Rotation
*Boundary
BC_Y, 2, 2
** Name: BC_X Type: Displacement/Rotation
*Boundary
BC_X, 1, 1
**
** LOADS
**
** Name: Gravity   Type: Gravity
*Dload
, GRAV, 9.8, 0., -1.
** Name: Pressure   Type: Pressure Using Field: NPU
*Dload
Part-1-1.27, P2, 1.12868e+06
Part-1-1.44, P1, 1.12868e+06
Part-1-1.104, P2, 1.12868e+06
Part-1-1.133, P2, 1.12868e+06
Part-1-1.134, P2, 1.12868e+06
Part-1-1.137, P2, 1.12868e+06
Part-1-1.138, P2, 1.12868e+06
Part-1-1.141, P2, 1.12868e+06
Part-1-1.143, P2, 1.12868e+06
Part-1-1.145, P2, 1.12868e+06
Part-1-1.147, P2, 1.12868e+06
Part-1-1.891, P3, 68405.1
Part-1-1.893, P1, 1.07819e+06
Part-1-1.902, P1, 169384.
Part-1-1.916, P2, 371342.
Part-1-1.918, P2, 270363.
Part-1-1.920, P2, 977216.
Part-1-1.922, P2, 876237.
Part-1-1.924, P2, 775258.
Part-1-1.926, P2, 674279.
Part-1-1.927, P2, 573300.
Part-1-1.929, P2, 472321.
**
** OUTPUT REQUESTS
**
*Restart, write, frequency=0
**
** FIELD OUTPUT: F-Output-1
**
*Output, field
*Node Output
U,
*Element Output, directions=YES
E, S
**
** HISTORY OUTPUT: H-Output-1
**
*Output, history, variable=PRESELECT
*End Step
